### ---preamble--- ###
log ./test.log
units micro
atom_style hybrid dipole sphere bond
boundary p p s

neighbor 1.0 bin
#neigh_modify every 1 delay 1 check yes
pair_style lj/cut/dipole/cut 1 20

### ---Create Particles and Region--- ###
region 1 block -393 393 -393 393 -0.1 0.1

create_box 1 1
create_atoms 1 random 10000 1235 NULL
pair_coeff 1 1 0.01 2.49451641079295 2.8 20
group Atoms type 1
mass * 1

set group Atoms dipole 0.0 0.0 0.0001

### ---Magnetic Field Steady State--- ###
### Magnetic field varibales
variable Bmag atom  8.81016722408027e-05 #manually
variable freq atom 4e-06
variable theta atom 0.46949356878647464
variable phi atom 0.0

variable fieldx atom v_Bmag*(cos(v_freq*time*2*PI)*sin(v_theta))
variable fieldy atom v_Bmag*(sin(v_freq*time*2*PI)*sin(v_theta))
variable fieldz atom v_Bmag*cos(v_theta)

### Fixes
fix 	1 Atoms set 1 0 group all dipole v_fieldx v_fieldy v_fieldz
fix 	2 Atoms brownian 300 92125 gamma_t 59.17065085714284
fix 	6 Atoms wall/lj126 zlo -2.0 0.01 1.247258205396475  1.4 zhi 2.0 0.01 1.247258205396475  1.4

minimize 1.0e-4 1.0e-6 100 1000

### Run Commands
timestep 	100.0
dump 	4 all custom 333 ./Output_files_MF/Magnetic_Field*.lammpstrj id type x   y   z
#dump_modify 4 every 333
thermo_style 	custom step atoms ke pe etotal
thermo 	100
run 	10000

write_restart Restart_Magnetic_Field


### ---System Compression--- ###
### Magnetic field varibales
variable Bmag atom  8.81016722408027e-05 #manually
variable freq atom 4e-06
variable theta atom 0.46949356878647464
variable phi atom 0.0

variable fieldx atom v_Bmag*(cos(v_freq*time*2*PI)*sin(v_theta))
variable fieldy atom v_Bmag*(sin(v_freq*time*2*PI)*sin(v_theta))
variable fieldz atom v_Bmag*cos(v_theta)

### Fixes
fix 	1 Atoms set 1 0 group all dipole v_fieldx v_fieldy v_fieldz
fix 	2 Atoms brownian 300 92125 gamma_t 59.17065085714284
fix 	6 Atoms wall/lj126 zlo -2.0 0.01 1.247258205396475  1.4 zhi 2.0 0.01 1.247258205396475  1.4
fix     7 all deform 1 x final -196 196 y final -196 196 units box

### Run Commands
timestep 	100.0
dump 	5 all custom 333 ./Output_files_MFC/Compression*.lammpstrj id type x   y   z
#dump_modify 5 every 333
thermo_style 	custom step atoms ke pe etotal
thermo 	100
run 	10000

write_restart Restart_Compression
